# 1. Исходные данные для статистического анализа
f(x, a, b) := Γ(a + b)*x^(a - 1)*(1 - x)^(b - 1)/(Γ(a)*Γ(b))
F(x, a, b) := integral(f(x, a, b), x = 0 .. x)
N0 := 10000
k := 0 .. N0 - 1
a := 0
b := 1
Y := runif(N0, a, b)
invar(r) := root(F(t, 10, 1) - r, t, 0, 1)
X[k] := invar(Y[k])
N(t) :=
    i ← 0
    while t > X[i]
        i ← i + 1
    N0 - i
h := 0.5
Tmax := round(max(X)/h, 0)
i := 0 .. Tmax
T[i] := i*h
i := 0 .. Tmax - 1
